FixedWing
0.0
0 0 0.0
0.365 0.318 1.2
0.230 0.0 0.0
#=============================================
SURFACE
WING
15  1.0   50 -2.0
YDUPLICATE
     0.00000
ANGLE
     0.0
SCALE
1.0  1.0  1.0
TRANSLATE
0.0  0.0  0.0
#----------------------------------
#    Xle         Yle         Zle         chord       angle   Nspan  Sspace
SECTION
    0.0        0.0         0.0        0.418         0.0     7   0.25
AFIL
N10.dat
#---------------------------
SECTION
    0.05       0.080        0.0        0.384         0.0    11  -2.70
AFIL
N10.dat
#---------------------------
SECTION
    0.065       0.105        0.0        0.496         0.0    11  -2.70
AFIL
N10.dat
#Cname   Cgain  Xhinge  HingeVec       SgnDup
CONTROL
flap  1.0   0.95     0.983 0.2 0.0    1.0
#---------------------------
SECTION
    0.392       0.600       0.0        0.137        -1.0    11  -2.25
AFIL
N10.dat
#Cname   Cgain  Xhinge  HingeVec       SgnDup
CONTROL
flap  1.0   0.95     0.983 0.2 0.0    1.0
